// COMSOL Multiphysics 6.1.0.282 model "FIS4-foam-setup.mph"
// Outline of the model tree
// Unit system: none

Parameters
  L = 20
  W = 20
  dL = 0.03
  Da = 2*10^-3*sc
  Db = 10^-3*sc
  Dc = 10^-3*sc
  Dd = 10^-3*sc
  sc = 100
  k1 = 5*10^10
  kb1 = 8.1*10^3
  k2 = 8*75*10^-4
  k3 = 10^3*75
  k4 = 2.3*10^9
  k5 = 1.2*2
  k0 = 0.014
  b0 = 9*10^-3
  d0 = 89.3*10^-3
  rho = 10^-4
  pert = 0.1

Functions
  rn1: Random | nargs = 2; seed = 113013
  step1: Step | smooth = 1

Geometry
  geom1 "Geometry 1" (2D, length unit m)
    r1: Rectangle | size = {L, W}
    fin: Finalize "Form Union"

Physics
  g: GeneralFormPDE on all domains
    dependent variable u = {a, b, c, d}
    ShapeProperty.order = 1
    gfeq1: GeneralFormPDE (default)
      f = {k1*b*d-kb1*a-k2*a-k4*c*a-k0*a, -k1*b*d+kb1*a+k2*a-2*k3*b^2+3*k4*c*a+k0*(b0-b), k3*b^2-k4*c*a-k5*c-k0*c, -k1*d*b+kb1*a+k0*(d0-d)}
      Ga = {{-Da*ax, -Da*ay}, {-Db*bx, -Db*by}, {-Dc*cx, -Dc*cy}, {-Dd*dx, -Dd*dy}}
      da = {1, 0, 0, 0, 0, 1, 0, 0, 0, 0, 1, 0, 0, 0, 0, 1}
    zflx1: ZeroFluxBoundary "Zero Flux 1" (default)
    init1: init "Initial Values 1" (default)
      a = 10^-8
      b = rho*(1+pert*rn1(x,y)-0.9*0+0.3*(cos(pi*x*2*5/L)+cos(pi*y*2*5/W))+0*0.9*2*(step1(L/4-x)+step1(x-3*L/4)))
      c = 10^-8
      d = 10^-8
      mde = 0
      md = 0
      cEl = 0
      cDT = rhoD*(1+pert*rn1(x,y))
      cEr = rhoE*(1+pert*rn1(x,y))
      cDD = 0
      me = 13
      mede = 0

Mesh
  mesh1 "Mesh 1"
    size: MeshSizeDefault | hmax = dL
    ftri1: FreeTri "Free Triangular 1" on remaining entities | smoothmaxiter = 4; smoothmaxdepth = 4

Studies
  std1 "Study 1"
    time: Transient "Time Dependent" | tlist = 0,10^range(0,0.1,10); usertol = on; rtol = 1e-5

Solver configurations
  sol1 "Solution 1" (study std1)
    v1: Variables "Dependent Variables 1"
    t1: Time "Time-Dependent Solver 1"
      tlist = 0,10^range(0,0.1,10)
      rtol = 1e-5
      atolglobalvaluemethod = manual
      atolglobal = 1e-5
      initialstepbdf = 1e-7
      bwinitstepfrac = 1e-4
      dDef: Direct | linsolver = pardiso
      fc1: FullyCoupled

Datasets
  dset1: Solution | solution = sol1

Plots
  pg4: PlotGroup2D "2D Plot Group 4" | data = dset1
    surf1: Surface | expr = b