// COMSOL Multiphysics 6.1.0.282 model "switchPMB_2+2D-sphere-setup.mph"
// Outline of the model tree
// Unit system: none

Parameters
  R = 5
  dL = 0.3
  D_D = 60
  D_E = 60
  D_d = 0.1
  D_de = 0.1
  D_e = 0.001
  kD = 0.15
  kdD = 0.00075
  kdeD = 0
  kd = 0
  kde = 0
  kdem = 1
  kdEl = 5*10^-6
  kdEr = 0.75
  ked = 0.1
  ke = 0.001
  lambda = 5
  mu = 20
  rhoD = 8000
  rhoE = 4000
  pert = 0.01

Functions
  rn2: Random | nargs = 4; seed = 20230322

Geometry
  geom2 "Geometry 2" (3D, length unit m)
    sph1: Sphere | r = R
    fin: Finalize "Form Union"

Physics
  gb: GeneralFormBoundaryPDE on all boundaries
    dependent variable u2 = {cDD, cDT, cEr, cEl, md, mde, me}
    ShapeProperty.order = 1
    EquationForm.form = Automatic
    gfeq1: GeneralFormPDE (default)
      f = {-lambda*cDD+(kde+kdem)*mde+kd*md, lambda*cDD-(kD+kdD*md+kdeD*mde)*cDT, -mu*cEr+kde*mde+ke*me-kdEr*md*cEr, mu*cEr-kdEl*md*cEl, (kD+kdD*md+kdeD*mde)*cDT-kdEr*md*cEr-kdEl*md*cEl-kd*md-ked*md*me, kdEr*md*cEr+kdEl*md*cEl+ked*md*me-(kde+kdem)*mde, kdem*mde-ked*md*me-ke*me}
      Ga = 
        {-cDDTx*D_D, -cDDTy*D_D, -cDDTz*D_D}
        {-cDTTx*D_D, -cDTTy*D_D, -cDTTz*D_D}
        {-cErTx*D_E, -cErTy*D_E, -cErTz*D_E}
        {-cElTx*D_E, -cElTy*D_E, -cElTz*D_E}
        {-mdTx*D_d, -mdTy*D_d, -mdTz*D_d}
        {-mdeTx*D_de, -mdeTy*D_de, -mdeTz*D_de}
        {-meTx*D_e, -meTy*D_e, -meTz*D_e}
      da = {1, 0, 0, 0, 0, 0, 0, 0, 1, 0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}
    init1: init "Initial Values 1" (default) | cDT = rhoD*(1+pert*rn2(x,y,z,1)); cEr = rhoE*(1+pert*rn2(x,y,z,2))

Mesh
  mesh2 "Mesh 2"
    size: MeshSizeDefault | hmax = 2*R; hmin = R; custom = on
    ftri1: FreeTri "Free Triangular 1" on all boundaries | method = del
      size1: Size on entire geometry | hmax = dL; hmin = dL/2; custom = on

Studies
  std1 "Study 1"
    time: Transient "Time Dependent" | tlist = 0,10^range(0,0.1,10); usertol = on; rtol = 1e-5

Solver configurations
  sol1 "Solution 1" (study std1)
    v1: Variables "Dependent Variables 1"
    t1: Time "Time-Dependent Solver 1"
      tlist = 0,10^range(0,0.1,10)
      rtol = 1e-5
      atolglobalvaluemethod = manual
      atolglobal = 1e-5
      initialstepbdf = 1e-7
      bwinitstepfrac = 1e-4
      dDef: Direct | linsolver = pardiso
      fc1: FullyCoupled

Datasets
  dset1: Solution | solution = sol1
  edg1: Edge2D
  par1: Parametric1D "Parametric Extrusion 1D 1" | data = edg1

Plots
  pg8: PlotGroup3D "3D Plot Group 1" | data = dset1
    surf1: Surface | expr = mde+me