// COMSOL Multiphysics 6.1.0.282 model "2s2cPAR-ellipsoidSurface-setup.mph"
// Outline of the model tree
// Unit system: none

Parameters
  L = 1
  W = 0.6
  dL = 0.04
  pert = 0.01
  kA = 1
  kB = 1
  ka = 1
  kb = 1
  kabb = 60
  kbaa = 60
  DA = 10
  DB = 10
  Da = 0.01
  Db = 0.01
  rhoA = 2
  rhoB = 2

Functions
  rn1: Random | nargs = 4; seed = 20230326

Geometry
  geom1 "Geometry 1" (3D, length unit m)
    elp1: Ellipsoid | semiaxes = {L, W, W}
    fin: Finalize "Form Union"

Physics
  gb: GeneralFormBoundaryPDE on all boundaries
    dependent variable u2 = {ma, mb, cA, cB}
    ShapeProperty.order = 1
    EquationForm.form = Automatic
    gfeq1: GeneralFormPDE (default)
      f = {kA*cA-(ka+kabb*mb^2)*ma, kB*cB-(kb+kbaa*ma^2)*mb, -(kA*cA-(ka+kabb*mb^2)*ma), -(kB*cB-(kb+kbaa*ma^2)*mb)}
      Ga = 
        {-maTx*Da, -maTy*Da, -maTz*Da}
        {-mbTx*Db, -mbTy*Db, -mbTz*Db}
        {-cATx*DA, -cATy*DA, -cATz*DA}
        {-cBTx*DB, -cBTy*DB, -cBTz*DB}
      da = {1, 0, 0, 0, 0, 1, 0, 0, 0, 0, 1, 0, 0, 0, 0, 1}
    init1: init "Initial Values 1" (default) | cA = rhoA*(1+pert*rn1(x,y,z,1)); cB = rhoB*(1+pert*rn1(x,y,z,2))

Mesh
  mesh1 "Mesh 1"
    size: MeshSizeDefault | hmax = 0.2; hmin = 0.036; hgrad = 1.5
    ftri1: FreeTri "Free Triangular 1" on all boundaries | method = del
      size1: Size on boundaries 1-8 | hmax = dL; hmin = dL; custom = on

Studies
  std1 "Study 1"
    time: Transient "Time Dependent" | tlist = 0, 10^range(0,0.1,4); usertol = on; rtol = 10^-5

Solver configurations
  sol1 "Solution 1" (study std1)
    v1: Variables "Dependent Variables 1"
    t1: Time "Time-Dependent Solver 1"
      tlist = 0, 10^range(0,0.1,4)
      atolglobalvaluemethod = manual
      atolglobal = 10^-6
      initialstepbdf = 10^-6
      dDef: Direct | linsolver = pardiso
      se1: Segregated
        ss1: SegregatedStep "General Form PDE" | segvar = {comp1_cA, comp1_cB}; linsolver = dDef
        ss2: SegregatedStep "General Form Boundary PDE" | segvar = {comp1_ma, comp1_mb}; linsolver = dDef

Datasets
  dset1: Solution | solution = sol1

Derived values
  int1: IntSurface "Surface Integration 1" on all boundaries | data = dset1; table = tbl1; expr = maTx^2+maTy^2+maTz^2

Tables
  tbl1: Table
    // Surface Integration 1
    Time | maTx^2+maTy^2+maTz^2
    0 | 7.72164e-19
    1 | 1.41002e-05
    1.25893 | 3.14806e-05
    1.58489 | 6.99165e-05
    1.99526 | 0.000147616
    2.51189 | 0.000283607
    3.16228 | 0.00047225
    3.98107 | 0.000650086
    5.01187 | 0.000718509
    6.30957 | 0.000635344
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
Plots
  pg1: PlotGroup3D "General Form PDE" | data = dset1
    slc1: Slice | expr = cA
  pg2: PlotGroup3D "General Form Boundary PDE" | data = dset1
    surf1: Surface | expr = ma
  pg3: PlotGroup1D "1D Plot Group 3" | data = dset1
    tblp1: Table "Table Graph 1" | table = tbl1

Exports
  tbl1: Table | table = tbl1; filename = D:\Henrik\Projects\RDinterfacePhysics\PAR\2s\2s2cPAR-interfaceLength.txt