// COMSOL Multiphysics 6.1.0.282 model "3sPAR-tuningMutualDetachment-Dc_1-meetingAngles-setup.mph"
// Outline of the model tree
// Unit system: none

Parameters
  Dc = 1
  Dm1 = 0.01*sc
  Dm2 = 0.01
  Dm3 = 0.01
  kC = 1
  km = 1
  k12 = 60
  k13 = 60
  k23 = 60
  L = 15
  dL = 0.05
  rho = 2
  sc = 1
  ex = 2

Variables
  var1 "Variables 1"
    f1 = kC*c1-(km+k12*m2^ex+k13*m3^ex)*m1
    f2 = kC*c2-(km+k12*m1^ex+k23*m3^ex)*m2
    f3 = kC*c3-(km+k13*m1^ex+k23*m2^ex)*m3

Geometry
  geom1 "Geometry 1" (2D, length unit m)
    c1: Circle | r = L
    fin: Finalize "Form Union"

Physics
  g: GeneralFormPDE on all domains
    dependent variable u = {m1, c1, m2, c2, m3, c3}
    ShapeProperty.order = 1
    EquationForm.form = Automatic
    gfeq1: GeneralFormPDE (default)
      f = {f1, -f1, f2, -f2, f3, -f3}
      Ga = 
        {-m1x*Dm1, -m1y*Dm1}
        {-c1x*Dc, -c1y*Dc}
        {-m2x*Dm2, -m2y*Dm2}
        {-c2x*Dc, -c2y*Dc}
        {-m3x*Dm3, -m3y*Dm3}
        {-c3x*Dc, -c3y*Dc}
      da = {1, 0, 0, 0, 0, 0, 0, 1, 0, 0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}
    zflx1: ZeroFluxBoundary "Zero Flux 1" (default)
    init1: init "Initial Values 1" (default)
      m1 = rho*(1-0.5*sin(pi*x/L/2))
      m2 = rho*(1+0.5*sin(pi*x/L/2)+0.5*sin(pi*y/L/2))
      m3 = rho*(1+0.5*sin(pi*x/L/2)-0.5*sin(pi*y/L/2))

Mesh
  mesh1 "Mesh 1"
    size: MeshSizeDefault | hmax = dL; hmin = dL; custom = on
    ftri1: FreeTri "Free Triangular 1" on remaining entities | method = del

Studies
  std1 "Study 1 - ini cond"
    time: Transient "Time Dependent" | tlist = 0,10^range(0,0.1,10); usertol = on; rtol = 10^-5
  std2 "Study 2 - sweep"
    param: Parametric "Parametric Sweep" | sweeptype = filled; pname = sc; plistarr = 10^range(0,0.1,2)
    time: Transient "Time Dependent"
      tlist = 0,10^range(0,0.1,7)
      usertol = on
      rtol = 10^-5
      useinitsol = on
      initmethod = sol
      initstudy = std1

Solver configurations
  sol1 "Solution 1" (study std1)
    v1: Variables "Dependent Variables 1"
    t1: Time "Time-Dependent Solver 1"
      tlist = 0,10^range(0,0.1,10)
      atolglobalvaluemethod = manual
      atolglobal = 10^-6
      initialstepbdf = 10^-6
      dDef: Direct | linsolver = pardiso
      fc1: FullyCoupled | linsolver = dDef
  sol2 "Solution 2" (study std2)
    v1: Variables "Dependent Variables 1"
    t1: Time "Time-Dependent Solver 1"
      tlist = 0,10^range(0,0.1,7)
      atolglobalvaluemethod = manual
      atolglobal = 10^-6
      initialstepbdf = 10^-6
      dDef: Direct | linsolver = pardiso
      fc1: FullyCoupled | linsolver = dDef
  sol3 "Parametric Solutions 1" (study std2)

Datasets
  dset1: Solution | solution = sol1
  dset2: Solution | solution = sol2
  dset3: Solution | solution = sol3

Plots
  pg1: PlotGroup2D "General Form PDE" | data = dset1
    surf1: Surface | expr = (m3x+c3x)^2+(m3y+c3y)^2
  pg2: PlotGroup2D "General Form PDE 1" | data = dset2
    surf1: Surface | expr = (m3x+c3x)^2+(m3y+c3y)^2
  pg3: PlotGroup2D "General Form PDE 2" | data = dset3
    surf1: Surface | expr = m1*m2*m3

Exports
  data1: Data
    data = dset3
    expr = {((m1x+c1x)^2+(m1y+c1y)^2), ((m2x+c2x)^2+(m2y+c2y)^2), ((m3x+c3x)^2+(m3y+c3y)^2)}
    filename = D:\Henrik\Projects\RDinterfacePhysics\PAR\3s\mutualDetachment-Dc_1-NeumannAngles-squareGradients-fine0_05.txt
    location = regulargrid
    regulargridx2 = 1000
    regulargridy2 = 1000
  data2: Data
    data = dset3
    expr = {(1-Dm1/Dc)*(m1x+c1x)*f1+(1-Dm2/Dc)*(m2x+c2x)*f2+(1-Dm3/Dc)*(m3x+c3x)*f3, (1-Dm1/Dc)*(m1y+c1y)*f1+(1-Dm2/Dc)*(m2y+c2y)*f2+(1-Dm3/Dc)*(m3y+c3y)*f3}
    filename = D:\Henrik\Projects\RDinterfacePhysics\PAR\3s\mutualDetachment-Dc_1-NeumannAngles-coreTurnover-fine0_05.txt
    location = grid
    gridx2 = range(-10,0.005,5)
    gridy2 = range(-5,0.005,5)
    regulargridx2 = 1000
    regulargridy2 = 1000
  data3: Data
    data = dset3
    expr = Dm1*((m1x+c1x)^2+(m1y+c1y)^2)+Dm2*((m2x+c2x)^2+(m2y+c2y)^2)+Dm3*((m3x+c3x)^2+(m3y+c3y)^2)
    filename = D:\Henrik\Projects\RDinterfacePhysics\PAR\3s\mutualDetachment-Dc_1-NeumannAngles-surfaceTension-fine0_05.txt
    location = regulargrid
    gridx2 = range(-10,0.005,5)
    gridy2 = range(-5,0.005,5)
    regulargridx2 = 1000
    regulargridy2 = 1000
  data4: Data
    data = dset3
    expr = {m1, m2, m3}
    filename = D:\Henrik\Projects\RDinterfacePhysics\PAR\3s\mutualDetachment-Dc_1-NeumannAngles-membraneDensities-DmRatio_10-fine0_05.txt
    location = regulargrid
    regulargridx2 = 300
    regulargridy2 = 300
  data5: Data
    data = dset3
    expr = Dm1/(1-Dm1/Dc)^2*((m1x+c1x)^2+(m1y+c1y)^2)+Dm2/(1-Dm2/Dc)^2*((m2x+c2x)^2+(m2y+c2y)^2)+Dm3/(1-Dm3/Dc)^2*((m3x+c3x)^2+(m3y+c3y)^2)
    filename = D:\Henrik\Projects\RDinterfacePhysics\PAR\3s\mutualDetachment-Dc_1-NeumannAngles-surfaceTension-fine0_05-effPotentialFormulation.txt
    location = regulargrid
    gridx2 = range(-10,0.005,5)
    gridy2 = range(-5,0.005,5)
    regulargridx2 = 1000
    regulargridy2 = 1000