// COMSOL Multiphysics 6.1.0.282 model "3sPAR-mutualDetachment-DmAsymm-coarsening-ensembleSize3-setup.mph"
// Outline of the model tree
// Unit system: none

Parameters
  Dc = 1
  Dm1 = 0.2
  Dm2 = 0.01
  Dm3 = 0.01
  kC = 1
  km = 1
  kmm = 60
  L = 30
  dL = 0.1
  rho = 2
  pert = 0.5
  seed = 1

Functions
  rn1: Random | nargs = 3; seed = 20230512+seed

Variables
  var1 "Variables 1"
    f1 = kC*c1-(km+kmm*(m2^2+m3^2))*m1
    f2 = kC*c2-(km+kmm*(m1^2+m3^2))*m2
    f3 = kC*c3-(km+kmm*(m1^2+m2^2))*m3

Geometry
  geom1 "Geometry 1" (2D, length unit m)
    r1: Rectangle | size = {L, L}
    fin: Finalize "Form Union"

Physics
  g: GeneralFormPDE on all domains
    dependent variable u = {m1, c1, m2, c2, m3, c3}
    ShapeProperty.order = 1
    EquationForm.form = Automatic
    gfeq1: GeneralFormPDE (default)
      f = {f1, -f1, f2, -f2, f3, -f3}
      Ga = 
        {-m1x*Dm1, -m1y*Dm1}
        {-c1x*Dc, -c1y*Dc}
        {-m2x*Dm2, -m2y*Dm2}
        {-c2x*Dc, -c2y*Dc}
        {-m3x*Dm3, -m3y*Dm3}
        {-c3x*Dc, -c3y*Dc}
      da = {1, 0, 0, 0, 0, 0, 0, 1, 0, 0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}
    zflx1: ZeroFluxBoundary "Zero Flux 1" (default)
    init1: init "Initial Values 1" (default)
      m1 = rho*(1+pert*rn1(x,y,1))
      m2 = rho*(1+pert*rn1(x,y,2))
      m3 = rho*(1+pert*rn1(x,y,3))

Mesh
  mesh1 "Mesh 1"
    size: MeshSizeDefault | hmax = dL; hmin = dL; custom = on
    ftri1: FreeTri "Free Triangular 1" on remaining entities | method = del

Studies
  std1 "Study 1"
    param: Parametric "Parametric Sweep" | sweeptype = filled; pname = seed; plistarr = 1,2,3
    time: Transient "Time Dependent" | tlist = 0,10^range(0,0.02,10); usertol = on; rtol = 10^-5

Solver configurations
  sol1 "Solution 1" (study std1)
    v1: Variables "Dependent Variables 1"
    t1: Time "Time-Dependent Solver 1"
      tlist = 0,10^range(0,0.02,10)
      atolglobalvaluemethod = manual
      atolglobal = 10^-6
      initialstepbdf = 1^-6
      dDef: Direct | linsolver = pardiso
      fc1: FullyCoupled | linsolver = dDef
  sol2 "Parametric Solutions 1" (study std1)
  sol6 "Parametric Solutions 2" (study std1)

Datasets
  dset1: Solution | solution = sol1
  dset2: Solution | solution = sol2
  dset3: Solution | solution = sol6

Plots
  pg1: PlotGroup2D "General Form PDE" | data = dset3
    surf1: Surface | expr = m1*m2*m3
  pg2: PlotGroup2D "General Form PDE 1" | data = dset2
    surf1: Surface | expr = m1
  pg3: PlotGroup2D "General Form PDE 2" | data = dset3
    surf1: Surface | expr = m1

Exports
  data1: Data
    data = dset3
    expr = {m1+c1, m2+c2, m3+c3}
    filename = D:\Henrik\Projects\RDinterfacePhysics\PAR\3s\mutualDetachment-Dc_1-asymmDm-coarsening-ensembleSize3.txt
    location = regulargrid
    regulargridx2 = 300
    regulargridy2 = 300
  data2: Data
    data = dset3
    expr = {((m1x+c1x)^2+(m1y+c1y)^2), ((m2x+c2x)^2+(m2y+c2y)^2), ((m3x+c3x)^2+(m3y+c3y)^2)}
    filename = D:\Henrik\Projects\RDinterfacePhysics\PAR\3s\mutualDetachment-Dc_1-asymmDm-coarsening-interfaces-ensembleSize3-fine.txt
    location = regulargrid
    regulargridx2 = 600
    regulargridy2 = 600
  data3: Data
    data = dset3
    expr = {m1, m2, m3}
    descr = {Dependent variable m1, Dependent variable m2, Dependent variable m3}
    filename = D:\Henrik\Projects\RDinterfacePhysics\PAR\3s\mutualDetachment-Dc_1-asymmDm-coarsening-ensembleSize3-membraneDensities.txt
    location = regulargrid
    regulargridx2 = 300
    regulargridy2 = 300