// COMSOL Multiphysics 6.1.0.282 model "3sPAR-tuningMutuallySuppressedAttachment-Dc_1-meetingAngles-setup.mph"
// Outline of the model tree
// Unit system: none

Parameters
  Dc = 1
  Dm1 = 0.01
  Dm2 = 0.01
  Dm3 = 0.01
  kC = 1
  km = 1
  k12 = 10
  k13 = 10
  k23 = 10*sc
  L = 15
  dL = 0.05
  rho = 2
  sc = 1
  ex = 2

Functions
  rn1: Random | nargs = 3; seed = 113013

Variables
  var1 "Variables 1"
    f1 = kC*c1/(1+(k12*m2^ex+k13*m3^ex))-km*m1
    f2 = kC*c2/(1+(k12*m1^ex+k23*m3^ex))-km*m2
    f3 = kC*c3/(1+(k13*m1^ex+k23*m2^ex))-km*m3
    f4 = kC*c4/(1+(k14*m1^ex+k24*m2^ex))-km*m4

Geometry
  geom1 "Geometry 1" (2D, length unit m)
    r1: Rectangle (disabled) | size = {L, L}
    c1: Circle | r = L
    fin: Finalize "Form Union"

Physics
  g: GeneralFormPDE on all domains
    dependent variable u = {m1, c1, m2, c2, m3, c3}
    ShapeProperty.order = 1
    gfeq1: GeneralFormPDE (default)
      f = {f1, -f1, f2, -f2, f3, -f3}
      Ga = 
        {-Dm1*m1x, -Dm1*m1y}
        {-Dc*c1x, -Dc*c1y}
        {-Dm2*m2x, -Dm2*m2y}
        {-Dc*c2x, -Dc*c2y}
        {-Dm3*m3x, -Dm3*m3y}
        {-Dc*c3x, -Dc*c3y}
      da = {1, 0, 0, 0, 0, 0, 0, 1, 0, 0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}
    zflx1: ZeroFluxBoundary "Zero Flux 1" (default)
    init1: init "Initial Values 1" (default)
      m1 = rho*(1-0.5*sin(pi*x/L/2))
      m2 = rho*(1+0.5*sin(pi*x/L/2)+0.5*sin(pi*y/L/2))
      m3 = rho*(1+0.5*sin(pi*x/L/2)-0.5*sin(pi*y/L/2))
      m4 = rho*(1+0.5*rn1(x,y,4))

Mesh
  mesh1 "Mesh 1"
    size: MeshSizeDefault | hmax = dL
    ftri1: FreeTri "Free Triangular 1" on remaining entities | method = del

Studies
  std1 "Study 1 - symm ini cond"
    time: Transient "Time Dependent" | tlist = 0,10^range(0,0.1,10); usertol = on; rtol = 10^-5
  std2 "Study 2 - 10,10*sc"
    param: Parametric "Parametric Sweep" | pname = sc; plistarr = 10^range(0,0.1,2.3)
    time: Transient "Time Dependent"
      tlist = 0,10^range(0,0.1,7)
      usertol = on
      rtol = 10^-8
      useinitsol = on
      initmethod = sol
      initstudy = std1
      initsol = current

Solver configurations
  sol1 "Solution 1" (study std1)
    v1: Variables "Dependent Variables 1"
    t1: Time "Time-Dependent Solver 1" | tlist = 0,10^range(0,0.1,10); atolglobal = 10^-6; initialstepbdf = 10^-6
      dDef: Direct | linsolver = pardiso
      fc1: FullyCoupled | linsolver = dDef
  sol2 "Solution 2" (study std2)
    v1: Variables "Dependent Variables 1"
    t1: Time "Time-Dependent Solver 1" | tlist = 0,10^range(0,0.1,7); atolglobal = 10^-6; initialstepbdf = 10^-6
      dDef: Direct | linsolver = pardiso
      fc1: FullyCoupled | linsolver = dDef
  sol3 "Parametric Solutions 1" (study std2)

Datasets
  dset1: Solution | solution = sol1
  dset2: Solution | solution = none
  cln1: CutLine2D | data = dset3; genpoints = {{1, 0}, {1, L}}
  dset3: Solution | solution = sol2
  dset4: Solution | solution = none
  dset5: Solution | solution = none
  dset6: Solution | solution = none
  dset7: Solution | solution = none
  int1: Integral | data = dset1
  dset8: Solution | solution = sol3

Derived values
  int1: IntSurface "Surface Integration 1" on all domains
    data = dset5
    table = tbl1
    expr = {(1-Dm1/Dc)*(m1x+c1x)*f1+(1-Dm2/Dc)*(m2x+c2x)*f2+(1-Dm3/Dc)*(m3x+c3x)*f3, (1-Dm1/Dc)*(m1y+c1y)*f1+(1-Dm2/Dc)*(m2y+c2y)*f2+(1-Dm3/Dc)*(m3y+c3y)*f3}

Tables
  tbl1: Table
    // Surface Integration 1
    sc | Time | (1-Dm1/Dc)*(m1x+c1x)*f1+(1-Dm2/Dc)*(m2x+c2x)*f2+(1-Dm3/Dc)*(m3x+c3x)*f3 | (1-Dm1/Dc)*(m1y+c1y)*f1+(1-Dm2/Dc)*(m2y+c2y)*f2+(1-Dm3/Dc)*(m3y+c3y)*f3
    1 | 1e+10 | 6.62854e-05 | -0.000389468
    1.25893 | 1e+10 | 0.00119815 | -0.000586384
    1.58489 | 1e+10 | 0.00172218 | -0.00054215
    1.99526 | 1e+10 | 0.00160701 | -0.00140513
    2.51189 | 1e+10 | 0.00185918 | -0.0018837
    3.16228 | 1e+10 | 0.00248051 | -0.00159605
    3.98107 | 1e+10 | 0.00301288 | -0.000401523
    5.01187 | 1e+10 | 0.00237255 | -0.0028338
    6.30957 | 1e+10 | 0.00195387 | -0.00334478
    7.94328 | 1e+10 | 0.00357596 | 0.000457545
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
Exports
  data1: Data "field data"
    data = dset8
    expr = {m1+c1, m2+c2, m3+c3}
    filename = D:\Henrik\Projects\RDinterfacePhysics\PAR\3s\mutuallySuppressedAttachment-Dc_1-NeumannAngles-fine.txt
    location = regulargrid
    gridx2 = range(-3,0.02,3)
    gridy2 = range(-3,0.02,3)
    regulargridx2 = 1000
    regulargridy2 = 1000
  data2: Data "gradient data"
    data = dset8
    expr = {((m1x+c1x)^2+(m1y+c1y)^2), ((m2x+c2x)^2+(m2y+c2y)^2), ((m3x+c3x)^2+(m3y+c3y)^2)}
    filename = D:\Henrik\Projects\RDinterfacePhysics\PAR\3s\mutuallySuppressedAttachment-Dc_1-NeumannAngles-interfaces-fine.txt
    location = regulargrid
    gridx2 = range(-3,0.02,3)
    gridy2 = range(-3,0.02,3)
    regulargridx2 = 1000
    regulargridy2 = 1000
  data4: Data "core turnover data"
    data = dset8
    expr = {(1-Dm1/Dc)*(m1x+c1x)*f1+(1-Dm2/Dc)*(m2x+c2x)*f2+(1-Dm3/Dc)*(m3x+c3x)*f3, (1-Dm1/Dc)*(m1y+c1y)*f1+(1-Dm2/Dc)*(m2y+c2y)*f2+(1-Dm3/Dc)*(m3y+c3y)*f3}
    filename = D:\Henrik\Projects\RDinterfacePhysics\PAR\3s\mutuallySuppressedAttachment-Dc_1-NeumannAngles-coreTurnover-fine.txt
    location = grid
    gridx2 = range(-5,0.005,15)
    gridy2 = range(-5,0.005,5)
  data5: Data "surface tension data"
    data = dset8
    expr = Dm1*((m1x+c1x)^2+(m1y+c1y)^2)+Dm2*((m2x+c2x)^2+(m2y+c2y)^2)+Dm3*((m3x+c3x)^2+(m3y+c3y)^2)
    filename = D:\Henrik\Projects\RDinterfacePhysics\PAR\3s\mutuallySuppressedAttachment-Dc_1-NeumannAngles-surfaceTension-fineVery.txt
    location = regulargrid
    gridx2 = range(-3,0.02,3)
    gridy2 = range(-3,0.02,3)
    regulargridx2 = 3000
    regulargridy2 = 3000
  data6: Data "membrane densities"
    data = dset8
    expr = {m1, m2, m3}
    descr = {Dependent variable m1, Dependent variable m2, Dependent variable m3}
    filename = D:\Henrik\Projects\RDinterfacePhysics\PAR\3s\mutuallySuppressedAttachment-Dc_1-NeumannAngles-membraneDensities-kRatio_199_5-fine.txt
    location = regulargrid
    gridx2 = range(-3,0.02,3)
    gridy2 = range(-3,0.02,3)
    regulargridx2 = 300
    regulargridy2 = 300