// COMSOL Multiphysics 6.1.0.282 model "4sPAR-tuningMutuallySuppressedAttachment-Dc_1-setup.mph"
// Outline of the model tree
// Unit system: none

Parameters
  Dc = 1
  Dm1 = 0.01
  Dm2 = 0.01
  Dm3 = 0.01
  Dm4 = 0.01
  kC = 1
  km = 1
  k12 = 60*sc2
  k13 = 60*sc
  k14 = 60*sc
  k23 = 60*sc2
  k24 = 60*sc2
  k34 = 60*sc2
  L = 30
  dL = 0.2
  rho = 2
  sc = 40
  sc2 = 1/100
  ex = 4

Functions
  rn1: Random | nargs = 3; seed = 113013

Variables
  var1 "Variables 1"
    f1 = kC*c1/(1+(k12*m2^ex+k13*m3^ex+k14*m4^ex))-km*m1
    f2 = kC*c2/(1+(k12*m1^ex+k23*m3^ex+k24*m4^ex))-km*m2
    f3 = kC*c3/(1+(k13*m1^ex+k23*m2^ex+k34*m4^ex))-km*m3
    f4 = kC*c4/(1+(k14*m1^ex+k24*m2^ex+k34*m3^ex))-km*m4

Geometry
  geom1 "Geometry 1" (2D, length unit m)
    r1: Rectangle | size = {L, L}
    c1: Circle (disabled) | r = L
    fin: Finalize "Form Union"

Physics
  g: GeneralFormPDE on all domains
    dependent variable u = {m1, c1, m2, c2, m3, c3, m4, c4}
    ShapeProperty.order = 1
    gfeq1: GeneralFormPDE (default)
      f = {f1, -f1, f2, -f2, f3, -f3, f4, -f4}
      Ga = 
        {-Dm1*m1x, -Dm1*m1y}
        {-Dc*c1x, -Dc*c1y}
        {-Dm2*m2x, -Dm2*m2y}
        {-Dc*c2x, -Dc*c2y}
        {-Dm3*m3x, -Dm3*m3y}
        {-Dc*c3x, -Dc*c3y}
        {-Dm4*m4x, -Dm4*m4y}
        {-Dc*c4x, -Dc*c4y}
      da = {1, 0, 0, 0, 0, 0, 0, 0, 0, 1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}
    zflx1: ZeroFluxBoundary "Zero Flux 1" (default)
    init1: init "Initial Values 1" (default)
      m1 = rho*(1+0.5*rn1(x,y,1)+0.5*cos(pi*x/L)*cos(pi*y/L))
      m2 = rho*(1+0.5*rn1(x,y,2))
      m3 = rho*(1+0.5*rn1(x,y,3)-0.5*cos(3*pi*x/L))
      m4 = rho*(1+0.5*rn1(x,y,4))

Mesh
  mesh1 "Mesh 1"
    size: MeshSizeDefault | hmax = dL
    ftri1: FreeTri "Free Triangular 1" on remaining entities | method = del

Studies
  std1 "Study 1"
    time: Transient "Time Dependent" | tlist = 0,10^range(0,0.1,8); usertol = on; rtol = 10^-5

Solver configurations
  sol1 "Solution 1" (study std1)
    v1: Variables "Dependent Variables 1"
    t1: Time "Time-Dependent Solver 1" | tlist = 0,10^range(0,0.1,8); atolglobal = 10^-6; initialstepbdf = 10^-6
      dDef: Direct | linsolver = pardiso
      fc1: FullyCoupled | linsolver = dDef

Datasets
  dset1: Solution | solution = sol1

Plots
  pg2: PlotGroup2D "2D Plot Group 2" | data = dset1
    surf2: Surface | expr = m1
      trn1: Translation | trans = {0, L+1}
    surf3: Surface | expr = m2
      trn1: Translation | trans = {L+1, L+1}
    surf1: Surface | expr = m3
    surf4: Surface | expr = m4
      trn1: Translation | trans = {L+1, 0}

Exports
  data1: Data
    data = dset1
    expr = {m1, m2, m3, m4}
    descr = {, , , Dependent variable m4}
    filename = D:\Henrik\Projects\RDinterfacePhysics\PAR\4s\mutuallySuppressedAttachment-Dc_1-IncompleteLinearCompositionArrangement.txt
    location = regulargrid
    gridx2 = range(-3,0.02,3)
    gridy2 = range(-3,0.02,3)
    regulargridx2 = 300
    regulargridy2 = 300