// COMSOL Multiphysics 6.1.0.282 model "MinSwitchPMB-vonNeumannStats-usageExample-setup.mph"
// Outline of the model tree
// Unit system: none

Parameters
  L = 25
  dL = 0.3
  rhoD = 8000
  rhoE = 4000
  pert = 0.01
  DD = 60
  DE = 60
  Dd = 0.1
  Dde = 0.1
  De = 0.001
  kD = 0.15
  kdD = 0.00075
  kde = 0
  kdem = 1
  kdEl = 10^-5/2
  kdEr = 0.75
  ked = 0.1
  ke = 0.001
  lambda = 5
  mu = 20
  seed = 1

Functions
  rn1: Random | nargs = 3; seed = 20230422+seed
  step1: Step

Probes
  dom1: Domain "rhobarD" on all domains | expr = cDD+cDT+md+mde; unit = 1; table = tbl1
  dom2: Domain "rhobarE" on all domains | expr = cEr+cEl+mde+me; unit = 1; table = tbl1

Geometry
  geom1 "Geometry 1" (2D, length unit m)
    sq1: Square | size = L
    fin: Finalize "Form Union"

Physics
  g: GeneralFormPDE on all domains
    dependent variable u = {cDD, cDT, cEr, cEl, md, mde, me}
    ShapeProperty.order = 1
    EquationForm.form = Automatic
    gfeq1: GeneralFormPDE (default)
      f = {-lambda*cDD+(kde+kdem)*mde, lambda*cDD-(kD+kdD*md)*cDT, -mu*cEr+kde*mde+ke*me-kdEr*md*cEr, mu*cEr-kdEl*md*cEl, (kD+kdD*md)*cDT-kdEr*md*cEr-kdEl*md*cEl-ked*md*me, kdEr*md*cEr+kdEl*md*cEl+ked*md*me-(kde+kdem)*mde, kdem*mde-ked*md*me-ke*me}
      Ga = 
        {-cDDx*DD*(1+step1(t-10^10-1)), -cDDy*DD*(1+step1(t-10^10-1))}
        {-cDTx*DD*(1+step1(t-10^10-1)), -cDTy*DD*(1+step1(t-10^10-1))}
        {-cErx*DE*(1+step1(t-10^10-1)), -cEry*DE*(1+step1(t-10^10-1))}
        {-cElx*DE*(1+step1(t-10^10-1)), -cEly*DE*(1+step1(t-10^10-1))}
        {-mdx*Dd*(1+step1(t-10^10-1)), -mdy*Dd*(1+step1(t-10^10-1))}
        {-mdex*Dde*(1+step1(t-10^10-1)), -mdey*Dde*(1+step1(t-10^10-1))}
        {-mex*De*(1+step1(t-10^10-1)), -mey*De*(1+step1(t-10^10-1))}
      da = {1, 0, 0, 0, 0, 0, 0, 0, 1, 0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}
    zflx1: ZeroFluxBoundary "Zero Flux 1" (default)
    init1: init "Initial Values 1" (default) | cDD = rhoD*(1+pert*rn1(x,y,1)); cDT = 0; cEl = rhoE*(1+pert*rn1(x,y,2))

Mesh
  mesh1 "Mesh 1"
    size: MeshSizeDefault | hmax = dL; hmin = dL
    ftri1: FreeTri "Free Triangular 1" on remaining entities | method = del

Studies
  std1 "Study 1"
    param: Parametric "Parametric Sweep" | pname = seed; plistarr = 1; accumtable = tbl2; pdistrib = on
    time: Transient "Time Dependent" | tlist = 0,10^range(0,0.1,10),10^10+10^range(0,0.1,10); usertol = on; rtol = 10^-5

Solver configurations
  sol1 "Solution 1" (study std1)
    v1: Variables "Dependent Variables 1"
    t1: Time "Time-Dependent Solver 1"
      tlist = 0,10^range(0,0.1,10),10^10+10^range(0,0.1,10)
      atolglobalvaluemethod = manual
      atolglobal = 10^-6
      initialstepbdf = 10^-6
      dDef: Direct | linsolver = pardiso
      fc1: FullyCoupled | linsolver = dDef
  sol2 "Parametric Solutions 1" (study std1)

Datasets
  dset1: Solution | solution = sol1
  dset2: Solution "Probe Solution 2" | solution = sol1
  avh1: Average "rhobarD" on domains 1 | data = dset2
  avh2: Average "rhobarE" on domains 1 | data = dset2
  dset3: Solution | solution = none
  dset4: Solution | solution = none
  dset5: Solution | solution = none
  dset6: Solution | solution = sol2

Derived values
  pev1: EvalPoint "rhobarD" | data = avh1; table = tbl2; expr = cDD+cDT+md+mde
  pev2: EvalPoint "rhobarE" | data = avh2; table = tbl2; expr = cEr+cEl+mde+me

Tables
  tbl1: Table "Probe Table 1"
    Time (s) | cDD+cDT+md+mde, rhobarD | cEr+cEl+mde+me, rhobarE
    0 | 8000.31 | 4000
    1 | 8000.31 | 4000
    1.25893 | 8000.31 | 4000
    1.58489 | 8000.31 | 4000
    1.99526 | 8000.31 | 4000
    2.51189 | 8000.31 | 4000
    3.16228 | 8000.31 | 4000
    3.98107 | 8000.31 | 4000
    5.01187 | 8000.31 | 4000
    6.30957 | 8000.31 | 4000
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  tbl2: Table "Accumulated Probe Table 2"
    seed | Time | cDD+cDT+md+mde, rhobarD | cEr+cEl+mde+me, rhobarE
    1 | 0 | 8000.31 | 4000
    1 | 1 | 8000.31 | 4000
    1 | 1.25893 | 8000.31 | 4000
    1 | 1.58489 | 8000.31 | 4000
    1 | 1.99526 | 8000.31 | 4000
    1 | 2.51189 | 8000.31 | 4000
    1 | 3.16228 | 8000.31 | 4000
    1 | 3.98107 | 8000.31 | 4000
    1 | 5.01187 | 8000.31 | 4000
    1 | 6.30957 | 8000.31 | 4000
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
Plots
  pg1: PlotGroup2D "General Form PDE" | data = dset1
    surf1: Surface | expr = mde+me
  pg2: PlotGroup1D "Probe Plot Group 2"
    tblp1: Table "Probe Table Graph 1" | table = tbl1

Exports
  data1: Data
    data = dset6
    expr = {mde+me, md+mde}
    filename = E:\Henrik\Projects\TuringFoam-revision\usageExample\Min\MinSwitchPMB-vonNeumannStats-usageExample.txt
    location = regulargrid
    regulargridx2 = 75
    regulargridy2 = 75